*Heading
 Gregoire 3PB MATLAB-match base mesh
** Job name: Gregoire_3PB Model name: Gregoire_3PB
** Generated by: Abaqus/CAE 2024
*Preprint, echo=NO, model=NO, history=NO, contact=NO
**
** PARTS
**
*Part, name=Beam2D
*Node
      1,         150.,           0.
      2,         150.,         100.
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*Element, type=CPS3
   1,    1,   13,  527
   2,  527,  216,    1
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*Nset, nset=_G3, internal, generate
    1,  7319,     1
*Elset, elset=_G3, internal, generate
     1,  14268,      1
*Nset, nset=Support_Left
 201,
*Nset, nset=Support_Right
 311,
*Nset, nset=Load_Nodes, generate
 439,  441,    1
*Nset, nset=CMOD1
 9,
*Nset, nset=CMOD2
 12,
** Section: BeamSec
*Solid Section, elset=_G3, material=Concrete
50.,
*End Part
**
**
** ASSEMBLY
**
*Assembly, name=Assembly
**
*Instance, name=BeamInst, part=Beam2D
*End Instance
**
*Nset, nset=CMOD1, instance=BeamInst
 9,
*Nset, nset=CMOD2, instance=BeamInst
 12,
*Nset, nset=Load_Nodes, instance=BeamInst, generate
 439,  441,    1
*Nset, nset=Support_Left, instance=BeamInst
 201,
*Nset, nset=Support_Right, instance=BeamInst
 311,
*End Assembly
**
** MATERIALS
**
*Material, name=Concrete
*Depvar
  3,
** 1=kappa  2=omega(damage)  3=H(Oliver bandwidth)
*User Material, constants=5
** E, nu, ft, GF, fc/ft
37000.0, 0.20, 3.50, 0.0900, 10.0
*Step, name=Loading, nlgeom=NO, inc=50000
*Static, direct=NO STOP
1.0e-04, 1.0
*Controls, parameters=field, field=displacement
1e-6,
**
** BOUNDARY CONDITIONS
**
** Name: BC_Load Type: Displacement/Rotation
*Boundary
Load_Nodes, 2, 2, -0.2
** Name: BC_SupL Type: Displacement/Rotation
*Boundary
Support_Left, 1, 1
Support_Left, 2, 2
** Name: BC_SupR Type: Displacement/Rotation
*Boundary
Support_Right, 2, 2
**
** OUTPUT REQUESTS
**
**
** FIELD OUTPUT: F-Output-1
**
**
** HISTORY OUTPUT: H-Output-1
**
** === MATLAB-MATCH OUTPUTS (single set) ===
*Restart, write, frequency=0
*Output, field, number interval=200
*Node Output
RF, U
*Element Output, directions=YES
S, E, SDV
*Output, history, frequency=1
*Node Output, nset=CMOD1
U1,
*Node Output, nset=CMOD2
U1,
*Node Output, nset=Load_Nodes
RF2, U2
*End Step
