*Heading
** Job name: Job-3 Model name: main-Copy
** Generated by: Abaqus/CAE 2024
*Preprint, echo=NO, model=NO, history=NO, contact=NO
**
** PARTS
**
*Part, name=main
*Node
      1,        43.75,       -11.25,           0.
      2,        43.75,       -11.25,         100.
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*Element, type=C3D4
    1, 6910, 6911, 6912, 6913
    2, 6910, 6914, 6915, 6916
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*Nset, nset="Edge Seeds-1"
     9,    10,    11,    12,    21,    22
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*Elset, elset="Edge Seeds-1"
  40947,  40948,  40949,  40950,  40951,  40952
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*Nset, nset=Set-33, generate
     1,  19636,      1
*Elset, elset=Set-33, generate
      1,  103583,       1
*Nset, nset=CMOD1
 480,
*Nset, nset=CMOD2
 370,
** Section: Section-1
*Solid Section, elset=Set-33, material=Material-1
,
*End Part
**
**
** ASSEMBLY
**
*Assembly, name=Assembly
**
*Instance, name=main-1, part=main
*End Instance
**
*Nset, nset=Set-7, instance=main-1
   13,   14,   15,   16,   17,   18
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*Elset, elset=Set-7, instance=main-1, generate
 18346,  21161,      1
*Nset, nset=Set-8, instance=main-1
     1,     2,     3,     4,    33,    34
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*Elset, elset=Set-8, instance=main-1, generate
 37990,  40946,      1
*End Assembly
**
** MATERIALS
**
*Material, name=Material-1
*Density
7860.,
**
** BOUNDARY CONDITIONS
**
** Name: left Type: Symmetry/Antisymmetry/Encastre
*Boundary
Set-7, XSYMM
** Name: right Type: Symmetry/Antisymmetry/Encastre
*Boundary
Set-8, PINNED
** ----------------------------------------------------------------
**
** STEP: Step-1
**
*Step, name=Step-1, nlgeom=NO
*Static
1., 1., 1e-05, 1.
**
** OUTPUT REQUESTS
**
*Restart, write, frequency=0
**
** FIELD OUTPUT: F-Output-1
**
*Output, field, variable=PRESELECT
**
** HISTORY OUTPUT: H-Output-1
**
*Output, history, variable=PRESELECT
*End Step
