*Heading
** Job name: Job-2 Model name: main
** Generated by: Abaqus/CAE 2024
*Preprint, echo=NO, model=NO, history=NO, contact=NO
**
** PARTS
**
*Part, name=main
*Node
      1,        43.75,       -11.25,           0.
      2,        43.75,       -11.25,         100.
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*Element, type=C3D4
    1, 6910, 6911, 6912, 6913
    2, 6910, 6914, 6915, 6916
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*Nset, nset="Edge Seeds-1"
     9,    10,    11,    12,    21,    22
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*Elset, elset="Edge Seeds-1"
  40947,  40948,  40949,  40950,  40951,  40952
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*Nset, nset=Set-33, generate
     1,  19636,      1
*Elset, elset=Set-33, generate
      1,  103583,       1
*Nset, nset=CMOD1
 480,
*Nset, nset=CMOD2
 370,
** Section: Section-1
*Solid Section, elset=Set-33, material=Material-1
,
*End Part
**
**
** ASSEMBLY
**
*Assembly, name=Assembly
**
*Instance, name=main-1, part=main
*End Instance
**
*Nset, nset=Set-7, instance=main-1
   14,   15,   17,   18,  245,  246
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*Elset, elset=Set-7, instance=main-1
 18545, 18806, 18895, 18924, 18926, 19051
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*Nset, nset=Set-8, instance=main-1
   13,   16,   19,   20,  256,  257
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*Elset, elset=Set-8, instance=main-1
 18455, 18522, 18639, 18640, 18697, 18804
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*Nset, nset=Set-9, instance=main-1
    2,    3,   33,   35,   54,   55
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*Elset, elset=Set-9, instance=main-1
 38480, 38499, 38513, 38537, 38547, 38632
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*Nset, nset=Set-10, instance=main-1
    1,    4,   34,   36,   75,   76
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*Elset, elset=Set-10, instance=main-1
 38159, 38414, 38489, 38509, 38523, 38560
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*End Assembly
**
** MATERIALS
**
*Material, name=Material-1
*Density
7860.,
**
** BOUNDARY CONDITIONS
**
** Name: back_left Type: Symmetry/Antisymmetry/Encastre
*Boundary
Set-8, PINNED
** Name: back_right Type: Symmetry/Antisymmetry/Encastre
*Boundary
Set-10, PINNED
** Name: front_left Type: Symmetry/Antisymmetry/Encastre
*Boundary
Set-7, XSYMM
** Name: front_right Type: Symmetry/Antisymmetry/Encastre
*Boundary
Set-9, XSYMM
** ----------------------------------------------------------------
**
** STEP: Step-1
**
*Step, name=Step-1, nlgeom=NO
*Static
1., 1., 1e-05, 1.
**
** OUTPUT REQUESTS
**
*Restart, write, frequency=0
**
** FIELD OUTPUT: F-Output-1
**
*Output, field, variable=PRESELECT
**
** HISTORY OUTPUT: H-Output-1
**
*Output, history, variable=PRESELECT
*End Step
