*Heading
** Job name: Job-3 Model name: Model-1
** Generated by: Abaqus/CAE 2024
*Preprint, echo=NO, model=NO, history=NO, contact=NO
**
** PARTS
**
*Part, name=Part-3
*Node
      1,  -33.0393219,        38.75,         100.
      2,  -133.039322,        38.75,           0.
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*Element, type=C3D10
    1,  5275,  5276,  5277,  5278, 12163, 12162, 12161, 12165, 12164, 12166
    2,  5279,  5280,  5281,  5282, 12169, 12168, 12167, 12171, 12170, 12172
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*Nset, nset="Edge Seeds-1"
     1,     2,     5,     6,    51,    52
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*Elset, elset="Edge Seeds-1"
 36330, 36331, 36332, 36333, 36334, 36335
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*Nset, nset=Set-33, generate
     1,  88308,      1
*Elset, elset=Set-33, generate
     1,  59627,      1
** Section: Section-1
*Solid Section, elset=Set-33, material=Material-1
,
*End Part
**
**
** ASSEMBLY
**
*Assembly, name=Assembly
**
*Instance, name=Part-3-1, part=Part-3
*End Instance
**
*Nset, nset=left_left, instance=Part-3-1
 14,
*Nset, nset=left_right, instance=Part-3-1
 45,
*Nset, nset=right_r, instance=Part-3-1
 67,
*Nset, nset=right_right, instance=Part-3-1
 64,
*End Assembly
**
** MATERIALS
**
*Material, name=Material-1
*Density
7860.,
** ----------------------------------------------------------------
**
** STEP: Step-1
**
*Step, name=Step-1, nlgeom=NO
*Static
1., 1., 1e-05, 1.
**
** BOUNDARY CONDITIONS
**
** Name: BC-1 Type: Symmetry/Antisymmetry/Encastre
*Boundary
left_left, XSYMM
** Name: BC-2 Type: Symmetry/Antisymmetry/Encastre
*Boundary
left_right, XSYMM
** Name: BC-3 Type: Symmetry/Antisymmetry/Encastre
*Boundary
right_right, XSYMM
** Name: BC-4 Type: Symmetry/Antisymmetry/Encastre
*Boundary
right_r, XSYMM
**
** OUTPUT REQUESTS
**
*Restart, write, frequency=0
**
** FIELD OUTPUT: F-Output-1
**
*Output, field, variable=PRESELECT
**
** HISTORY OUTPUT: H-Output-1
**
*Output, history, variable=PRESELECT
*End Step
